<Lems xmlns="http://www.neuroml.org/lems/0.7.2" xmlns:xsi="http://www.w3.org/2001/XMLSchema-instance" xsi:schemaLocation="http://www.neuroml.org/lems/0.7.2  https://raw.githubusercontent.com/LEMS/LEMS/development/Schemas/LEMS/LEMS_v0.7.2.xsd">

    <Target component="sim1" reportFile="simulator.props" timesFile="time.dat"/>

        <!--Include standard NeuroML 2 ComponentType definitions-->

    <Include file="Cells.xml"/>
    <Include file="Networks.xml"/>
    <Include file="Simulation.xml"/>

        <!--Include the generated NeuroML 2 files-->

        <!--   Channel/synapse files-->
    <Include file="Leak.channel.nml"/>
        <!--   Cell files-->
    <Include file="purk2.cell.nml"/>
        <!--   Network file-->
    <Include file="PurkinjeCell.net.nml"/>

        <!--Note: this could be: Simulation id="sim1" ... , but Component type="Simulation" ...
        is used to allow validation of this file according to the LEMS schema specified above...-->
    <Component type="Simulation" id="sim1" length="140.0ms" step="0.005ms" target="network_PurkinjeCell">

        <Display id="GraphWin_11" title="PurkinjeCell: BigCell, BigCellCML, VOLTAGE, VOLTAGE, VOLTAGE, VOLTAGE, VOLTAGE, VOLTAGE" xmin="-0.014" xmax="0.15400001" ymin="-0.104" ymax="0.064" timeScale="1s">
            <Line id="v" timeScale="1s" quantity="BigCellCML/0/purk2/0/v" scale="1 V" color="#000000"/>

            <Line id="v" timeScale="1s" quantity="BigCellCML/0/purk2/5/v" scale="1 V" color="#ff0000"/>

            <Line id="v" timeScale="1s" quantity="BigCellCML/0/purk2/32/v" scale="1 V" color="#0000ff"/>

            <Line id="v" timeScale="1s" quantity="BigCellCML/0/purk2/40/v" scale="1 V" color="#009b00"/>

            <Line id="v" timeScale="1s" quantity="BigCellCML/0/purk2/46/v" scale="1 V" color="#ffc800"/>

            <Line id="v" timeScale="1s" quantity="BigCellCML/0/purk2/1348/v" scale="1 V" color="#8c6400"/>
        </Display>

        <OutputFile id="Var_42_0_0_OF" fileName="BigCellCML_0.0.dat">
            <OutputColumn id="v" quantity="BigCellCML/0/purk2/0/v"/>
        </OutputFile>

        <OutputFile id="Var_43_0_5_OF" fileName="BigCellCML_0.5.dat">
            <OutputColumn id="v" quantity="BigCellCML/0/purk2/5/v"/>
        </OutputFile>

        <OutputFile id="Var_44_0_32_OF" fileName="BigCellCML_0.32.dat">
            <OutputColumn id="v" quantity="BigCellCML/0/purk2/32/v"/>
        </OutputFile>

        <OutputFile id="Var_45_0_40_OF" fileName="BigCellCML_0.40.dat">
            <OutputColumn id="v" quantity="BigCellCML/0/purk2/40/v"/>
        </OutputFile>

        <OutputFile id="Var_46_0_46_OF" fileName="BigCellCML_0.46.dat">
            <OutputColumn id="v" quantity="BigCellCML/0/purk2/46/v"/>
        </OutputFile>

        <OutputFile id="Var_47_0_1348_OF" fileName="BigCellCML_0.1348.dat">
            <OutputColumn id="v" quantity="BigCellCML/0/purk2/1348/v"/>
        </OutputFile>
    </Component>

</Lems>
